#### LAMMPS input file for CG simulations #########################
#### MethylCellulose - Huang et.al, Macromolecules, 2016,49,1490###
#### Version : Nov-29-2017 ########################################
#Stage1: Minimization
#---------------Run a few steps to completely equilibrate system--#

log             log.single
units           lj
boundary        p p p
atom_style      molecular
bond_style      harmonic
angle_style     harmonic
dihedral_style  harmonic
improper_style  none
pair_style      lj96/cut 3.0
special_bonds   lj 0 0 0
pair_modify     shift yes mix geometric
read_data       replicated_15.data
include         in.cgpair_MC

#--------------------Initialize-------------------------------------#

thermo_style    custom step temp press etotal epair density
thermo          2000
neighbor        1.0 bin
neigh_modify    every 1 delay 0 check yes

#--------------------Remove Overlaps--------------------------------#
timestep 0.0005
fix 1 all nve/limit 0.001
fix 2 all momentum 1000 linear 1 1 1
dump 1 all custom 10000 dump_stage1.lammpstrj id type xu yu zu
run 100000
unfix 1
unfix 2
write_data melt_min.data

#---------------Main Run begins here-------------------------------#

velocity all create 1.0 29834732 rot yes dist gaussian

fix 1 all nvt temp 0.1 1.0 1.0
fix 2 all momentum 1000 linear 1 1 1

restart 5000 restart1_melt1 restart1_melt2
restart 100000 archive_restart.*
timestep 0.0005
run 200000

write_restart run1_melt.*
write_data run1_melt.data

run 100000

write_restart run2_melt.*
write_data run2_melt.data

unfix 1
unfix 2
